solve block
    # guess values
    a := 0
    d := 0
    μ := 0.4
    p := 0.4
    b := 0
    e := 0
    λ := 0.45
    c := 0
    f := 0
    # constraints
    (λ*p + (1 - p)*λ)*a == c*μ + b*μ
    (μ + λ*p + (1 - p)*λ)*b == μ*d + λ*p*a
    (μ + p*λ + (1 - p)*λ)*c == μ*f + μ*e + (1 - p)*λ*a
    (p*λ + μ)*e == (1 - p)*λ*b + λ*p*f + λ*p*c
    (μ + λ*p)*f == λ*(1 - p)*c
    a + b + c + d + e + f == 1
    # solver
    [a; b; c; d; e; f] := find(a, b, c, d, e, f) = [0.294931; 0.120123; 0.211675; 0.122542; 0.152192; 0.0985382]
    Potk1 := d
    Potk2 := (f + e + d) + (1 - (f + e + d))*(e + f)*(λ*p/(μ + λ*p))
    Q1 := 1 - Potk1
    Q1 = 0.877458
    Q2 := 1 - Potk2
    Q2 = 0.577961
end solve block
